// COMSOL Multiphysics 5.6.0.401 model "517_lab3.mph"
// Outline of the model tree

Geometry
  geom1 "Geometry 1" (3D, length unit m)
    sph1: Sphere | r = 0.001
    pt1: Point
    fin: Finalize "Form Union"

Materials
  mat1: Common "Material 1" on selection geom1_sph1_dom
    def "Basic"
      electricconductivity = 0.33

Physics
  ec: ConductiveMedia "Electric Currents" on all domains
    dependent variable V
    cucn1: CurrentConservation (default)
    ein1: ElectricInsulation (default)
    init1: init "Initial Values 1" (default)
    pcs1: PointCurrentSource on points 4 | Qjp = 1
    gnd1: Ground on boundaries 1-8

Mesh
  mesh1 "Mesh 1" (physics-controlled)

Studies
  std1 "Study 1"
    stat: Stationary

Solver configurations
  sol1 "Solution 1" (study std1)
    v1: Variables "Dependent Variables 1"
    s1: Stationary "Stationary Solver 1"
      fc1: FullyCoupled | linsolver = i1
      i1: Iterative | linsolver = cg
        mg1: Multigrid | prefun = amg

Datasets
  dset1: Solution | solution = sol1

Plots
  pg1: PlotGroup3D "Electric Potential (ec)" | data = dset1
    mslc1: Multislice | expr = V